τос := 0.8
ωл := 0.5*π/180
γ := 1/60*π/180
S1 := 0.55
Dpr := 0.05
R1 := 1000
Pли := 0.06
B := 0.03
circ(x, y) :=
    1 if 0 < 4*sqrt(x^2 + y^2)/Dpr^2 ≤ 1
    0 if 4*sqrt(x^2 + y^2)/Dpr^2 > 1
Ic(l1) := τос*S1*Pли*R1/(π*ωл*l1^4)*integral(integral(circ(x, y)*e^(2*((x - B)^2 + y^2)/(γ^2*l1^2)), x = -Dpr/2 .. Dpr/2), y = -Dpr/2 .. Dpr/2)
Δf := 10^6
Dзр := 0.02
A := 3.6^2*10^-6
Dλ := 0.8
Ned := 1.4*10^-15
Uшу := 1
S := 0.55
K := 100
Iшвнут := Ned*S*sqrt(Δf) = 7.7e-13
μ(l1) := τос*S1*Pли*R1/(π*ωл^2*l1^4)*integral(integral(circ(x, y)*e^(2*((x - B)^2 + y^2)/(γ^2*l1^2)), x = -Dpr/2 .. Dpr/2), y = -Dpr/2 .. Dpr/2)/Iшвнут
Iшвнут := 1*10^-9
Ic := Pли*R1*S1*Dзр^2/(4*ωл^2*200^4) = 2.70832e-8
μ1(l1) := Pли*R1*S1*Dзр^2/(4*ωл^2*l1^4)/Iшвнут
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# ,м
n := 0 .. 100
μ := 100
ξ[n] := rnd(2/μ) - 1/μ
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c := 3*10^8
δφ1 := 10^-3
f1 := 1.875*10^6
Δl1 := c*δφ1/(2*π*f1) = 0.0254648
f2 := f1*Δl1/0.001 = 47746483
Δl1 := c*δφ1/(2*π*f2) = 0.001
f2 := 5*10^7
f(x) := sin(x) + (rnd(2/μ) - 1/μ)
y(x) := sin(x)
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t := 0 .. 1499
f[t] := f(0 + 2*t*π/10)
y[t] := y(0 + 2*t*π/10)
sum(|f[t] - y[t]|, t)/1500 = 0.00507616
