Rd := 4
ωpr := 10*π/360
c1 := 3.74*10^-16
Tn := 200*10^-6
ρ := 0.3
c2 := 1.44*10^-2
Ld := 1500
λ := 0.808*10^-6
Ael := 0.0000000000540
η := 0.3
Dpr := 0.025
Kgl := 0.02
h := 6.6*10^-34
Ef := 100000
σ := 5.67*10^-8
Ne := 500
Tcv := 2700
ρf := 0.45
Me := 600
Fk := 1.4
B := 0.08
ωper := 10*π/180
P := 6250
γ := 20*π/(60*180)
ntg := 1
cT := 3*10^8
circ(x, y) :=
    1 if 0 < 4*(x^2 + y^2)/Dpr^2 ≤ 1
    0 if 4*(x^2 + y^2)/Dpr^2 > 1
nc(P) := 0.237*P*Rd*Tn*λ*η/(π*h*cT*ntg*ωper^2*Ld^4)*integral(integral(circ(x, y)*e^(2*((x - B)^2 + y^2)/(γ^2*Ld^2)), x = -Dpr/2 .. Dpr/2), y = -Dpr/2 .. Dpr/2)
nc(P) = 1470.47
ndf(P) := 0.77*P*ρ*Tn*λ*η*Dpr^2*ωpr^2/(4*h*cT*Ne*Me*ωper^2*Ld^2)
integral(0.3/(λ^4*(e^(c2/(λ*Tcv)) - 1)), λ = 0.8013*10^-6 .. 0.803*10^-6) = 1.59799e12
nfn := π*Ef*ρf*Tn*c1*Ael/(684*4*h*cT*Kgl*σ*Tcv^4*Fk^2)*(1.598*10^12)
hj(P) := sqrt(nfn + ndf(P) + nc(P))/3
nfn = 14260.3
ndf(P) = 20.4572
nc(P) = 1470.47
(10^5 - 100)/sqrt(200^2 + (sqrt(10^5 + 300 + 10^5)/3)^2) = 400.384
μ(P) := (nc(P) - ndf(P))/sqrt(200^2 + hj(P)^2 + 1000)
6200
μ(P) = 7.013
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1
τос := 0.8
ωл := 3*π/180
γ := 1*π/180
S := 0.55
Dpr := 0.05
R := 1000
Pли := 0.12
B := 0.03
circ(x, y) :=
    1 if 0 < 4*sqrt(x^2 + y^2)/Dpr^2 ≤ 1
    0 if 4*sqrt(x^2 + y^2)/Dpr^2 > 1
Uc(l) := τос*S*Pли*R/(π*ωл*l^4)*integral(integral(circ(x, y)*e^(2*((x - B)^2 + y^2)/(γ^2*l^2)), x = -Dpr/2 .. Dpr/2), y = -Dpr/2 .. Dpr/2)
Δf := 3*10^11
A := 3.6^2*10^-6
Dλ := 0.8
Uшу := 1
K := 100
Uшвнут := sqrt(S^2*Δf*A/Dλ^2 + Uшу^2/K^2) = 1355.61
μ(l) := τос*S*Pли*R/(π*ωл*l^4)*integral(integral(circ(x, y)*e^(2*((x - B)^2 + y^2)/(γ^2*l^2)), x = -Dpr/2 .. Dpr/2), y = -Dpr/2 .. Dpr/2)/Uшвнут
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